// SBML level 2 version 4

model Bachmann_RS25()

  // Compartments:
  compartment cyt = 0.4 pl;
  compartment nuc = 0.275 pl;

  // Species:
  species EpoRJAK2 in cyt = init_EpoRJAK2;  // substance in nM
  species EpoRpJAK2 in cyt = 0;  // substance in nM
  species p1EpoRpJAK2 in cyt = 0;  // substance in nM
  species p2EpoRpJAK2 in cyt = 0;  // substance in nM
  species p12EpoRpJAK2 in cyt = 0;  // substance in nM
  species EpoRJAK2_CIS in cyt = 0;
  species SHP1 in cyt = init_SHP1;  // substance in nM
  species SHP1Act in cyt = 0;  // substance in nM
  species STAT5 in cyt = init_STAT5;  // substance in nM
  species pSTAT5 in cyt = 0;  // substance in nM
  species npSTAT5 in nuc = 0;  // substance in nM
  species CISnRNA1 in nuc = 0;  // substance in au
  species CISnRNA2 in nuc = 0;  // substance in au
  species CISnRNA3 in nuc = 0;  // substance in au
  species CISnRNA4 in nuc = 0;  // substance in au
  species CISnRNA5 in nuc = 0;  // substance in au
  species CISRNA in cyt = 0;  // substance in au
  species CIS in cyt = 0;  // substance in nM
  species SOCS3nRNA1 in nuc = 0;  // substance in au
  species SOCS3nRNA2 in nuc = 0;  // substance in au
  species SOCS3nRNA3 in nuc = 0;  // substance in au
  species SOCS3nRNA4 in nuc = 0;  // substance in au
  species SOCS3nRNA5 in nuc = 0;  // substance in au
  species SOCS3RNA in cyt = 0;  // substance in au
  species SOCS3 in cyt = 0;  // substance in nM

  // Parameters:
  ActD = ;
  CISEqcOE_model = CISEqc*CISEqcOE;
  CISEqc_model = CISEqc/CISRNAEqc;
  CISInh_model = CISInh/CISEqc;
  CISRNADelay = 0.2728978;
  CISRNAEqc_model = CISRNAEqc/init_STAT5;
  CISRNATurn = 691.831;
  CISTurn = 0.004677351;
  CISoe = ;
  EpoRActJAK2 = 0.1986095;
  EpoRCISInh = 812830.5;
  EpoRCISRemove_model = EpoRCISRemove/init_EpoRJAK2;
  JAK2ActEpo = 870963.6;
  JAK2EpoRDeaSHP1_model = JAK2EpoRDeaSHP1/init_SHP1;
  SHP1ActEpoR_model = SHP1ActEpoR/init_EpoRJAK2;
  SHP1Dea = 0.006025596;
  SOCS3EqcOE_model = SOCS3Eqc*SOCS3EqcOE;
  SOCS3Eqc_model = SOCS3Eqc/SOCS3RNAEqc;
  SOCS3Inh_model = SOCS3Inh/SOCS3Eqc;
  SOCS3RNADelay = 1.573983;
  SOCS3RNAEqc_model = SOCS3RNAEqc/init_STAT5;
  SOCS3RNATurn = 0.01412538;
  SOCS3Turn = 16595.87;
  SOCS3oe = ;
  STAT5ActEpoR_model = STAT5ActEpoR/init_EpoRJAK2^2;
  STAT5ActJAK2_model = STAT5ActJAK2/init_EpoRJAK2;
  STAT5Exp = 0.05754399;
  STAT5Imp = 0.03548134;
  epo_level = ;
  init_CIS = ;
  init_CISRNA = ;
  init_CISnRNA1 = ;
  init_CISnRNA2 = ;
  init_CISnRNA3 = ;
  init_CISnRNA4 = ;
  init_CISnRNA5 = ;
  init_EpoRJAK2 = 3.013006;
  init_EpoRJAK2_CIS = ;
  init_EpoRpJAK2 = ;
  init_SHP1 = 44.66836;
  init_SHP1Act = ;
  init_SOCS3 = ;
  init_SOCS3RNA = ;
  init_SOCS3nRNA1 = ;
  init_SOCS3nRNA2 = ;
  init_SOCS3nRNA3 = ;
  init_SOCS3nRNA4 = ;
  init_SOCS3nRNA5 = ;
  init_STAT5 = 138.0384;
  init_npSTAT5 = ;
  init_p12EpoRpJAK2 = ;
  init_p1EpoRpJAK2 = ;
  init_p2EpoRpJAK2 = ;
  init_pSTAT5 = ;
  CISEqc = 331.1311;
  CISEqcOE = 0.2811901;
  CISInh = 7.943282e8;
  CISRNAEqc = 1;
  EpoRCISRemove = 7.691304;
  JAK2EpoRDeaSHP1 = 87.09636;
  SHP1ActEpoR = 0.0009772372;
  SOCS3Eqc = 120.2264;
  SOCS3EqcOE = 0.5571857;
  SOCS3Inh = 16.98244;
  SOCS3RNAEqc = 1;
  STAT5ActEpoR = 36.30781;
  STAT5ActJAK2 = 0.05754399;

  // Assignment rules:
  Epo := epo_level;

  // Reactions:
  v1_v_0: EpoRJAK2 => EpoRpJAK2; cyt*(Epo*EpoRJAK2*JAK2ActEpo/(SOCS3*SOCS3Inh_model + 1));  // modifiers: SOCS3
  v2_v_1: EpoRpJAK2 => EpoRJAK2; cyt*EpoRpJAK2*JAK2EpoRDeaSHP1_model*SHP1Act;  // modifiers: SHP1Act
  v3_v_2: EpoRpJAK2 => p1EpoRpJAK2; cyt*(EpoRpJAK2*EpoRActJAK2/(SOCS3*SOCS3Inh_model + 1));  // modifiers: SOCS3
  v4_v_3: EpoRpJAK2 => p2EpoRpJAK2; cyt*(3*EpoRpJAK2*EpoRActJAK2/((EpoRCISInh*EpoRJAK2_CIS + 1)*(SOCS3*SOCS3Inh_model + 1)));  // modifiers: EpoRJAK2_CIS, SOCS3
  v5_v_4: p1EpoRpJAK2 => p12EpoRpJAK2; cyt*(3*EpoRActJAK2*p1EpoRpJAK2/((EpoRCISInh*EpoRJAK2_CIS + 1)*(SOCS3*SOCS3Inh_model + 1)));  // modifiers: EpoRJAK2_CIS, SOCS3
  v6_v_5: p2EpoRpJAK2 => p12EpoRpJAK2; cyt*(EpoRActJAK2*p2EpoRpJAK2/(SOCS3*SOCS3Inh_model + 1));  // modifiers: SOCS3
  v7_v_6: p1EpoRpJAK2 => EpoRJAK2; cyt*JAK2EpoRDeaSHP1_model*SHP1Act*p1EpoRpJAK2;  // modifiers: SHP1Act
  v8_v_7: p2EpoRpJAK2 => EpoRJAK2; cyt*JAK2EpoRDeaSHP1_model*SHP1Act*p2EpoRpJAK2;  // modifiers: SHP1Act
  v9_v_8: p12EpoRpJAK2 => EpoRJAK2; cyt*JAK2EpoRDeaSHP1_model*SHP1Act*p12EpoRpJAK2;  // modifiers: SHP1Act
  v10_v_9: EpoRJAK2_CIS => ; cyt*EpoRJAK2_CIS*EpoRCISRemove_model*(p12EpoRpJAK2 + p1EpoRpJAK2);  // modifiers: p12EpoRpJAK2, p1EpoRpJAK2
  v11_v_10: SHP1 => SHP1Act; cyt*SHP1*SHP1ActEpoR_model*(EpoRpJAK2 + p12EpoRpJAK2 + p1EpoRpJAK2 + p2EpoRpJAK2);  // modifiers: EpoRpJAK2, p12EpoRpJAK2, p1EpoRpJAK2, p2EpoRpJAK2
  v12_v_11: SHP1Act => SHP1; cyt*SHP1Dea*SHP1Act;
  v13_v_12: STAT5 => pSTAT5; cyt*(STAT5*STAT5ActJAK2_model*(EpoRpJAK2 + p12EpoRpJAK2 + p1EpoRpJAK2 + p2EpoRpJAK2)/(SOCS3*SOCS3Inh_model + 1));  // modifiers: EpoRpJAK2, SOCS3, p12EpoRpJAK2, p1EpoRpJAK2, p2EpoRpJAK2
  v14_v_13: STAT5 => pSTAT5; cyt*(STAT5*STAT5ActEpoR_model*(p12EpoRpJAK2 + p1EpoRpJAK2)^2/((CIS*CISInh_model + 1)*(SOCS3*SOCS3Inh_model + 1)));  // modifiers: CIS, SOCS3, p12EpoRpJAK2, p1EpoRpJAK2
  v15_v_14: pSTAT5 => npSTAT5; cyt*STAT5Imp*pSTAT5;
  v16_v_15: npSTAT5 => STAT5; nuc*STAT5Exp*npSTAT5;
  v17_v_16: => CISnRNA1; nuc*(-CISRNATurn)*CISRNAEqc_model*npSTAT5*(ActD - 1);  // modifiers: npSTAT5
  v18_v_17: CISnRNA1 => CISnRNA2; nuc*CISnRNA1*CISRNADelay;
  v19_v_18: CISnRNA2 => CISnRNA3; nuc*CISnRNA2*CISRNADelay;
  v20_v_19: CISnRNA3 => CISnRNA4; nuc*CISnRNA3*CISRNADelay;
  v21_v_20: CISnRNA4 => CISnRNA5; nuc*CISnRNA4*CISRNADelay;
  v22_v_21: CISnRNA5 => CISRNA; nuc*CISnRNA5*CISRNADelay;
  v23_v_22: CISRNA => ; cyt*CISRNA*CISRNATurn;
  v24_v_23: => CIS; cyt*CISRNA*CISTurn*CISEqc_model;  // modifiers: CISRNA
  v25_v_24: CIS => ; cyt*CIS*CISTurn;
  v26_v_25: => CIS; cyt*CISoe*CISTurn*CISEqcOE_model;
  v27_v_26: => SOCS3nRNA1; nuc*(-SOCS3RNATurn)*SOCS3RNAEqc_model*npSTAT5*(ActD - 1);  // modifiers: npSTAT5
  v28_v_27: SOCS3nRNA1 => SOCS3nRNA2; nuc*SOCS3nRNA1*SOCS3RNADelay;
  v29_v_28: SOCS3nRNA2 => SOCS3nRNA3; nuc*SOCS3nRNA2*SOCS3RNADelay;
  v30_v_29: SOCS3nRNA3 => SOCS3nRNA4; nuc*SOCS3nRNA3*SOCS3RNADelay;
  v31_v_30: SOCS3nRNA4 => SOCS3nRNA5; nuc*SOCS3nRNA4*SOCS3RNADelay;
  v32_v_31: SOCS3nRNA5 => SOCS3RNA; nuc*SOCS3nRNA5*SOCS3RNADelay;
  v33_v_32: SOCS3RNA => ; cyt*SOCS3RNA*SOCS3RNATurn;
  v34_v_33: => SOCS3; cyt*SOCS3RNA*SOCS3Turn*SOCS3Eqc_model;  // modifiers: SOCS3RNA
  v35_v_34: SOCS3 => ; cyt*SOCS3*SOCS3Turn;
  v36_v_35: => SOCS3; cyt*SOCS3oe*SOCS3Turn*SOCS3EqcOE_model;

  // Unit definitions:
  unit time = 60 second;
  unit nM = 1e-9 mole;
  unit pl = 1e-12 litre;
end
