// SBML level 2 version 4

model Becker_RS46()

  // Compartments:
  compartment default = 1;

  // Species:
  species Epo in default = init_Epo;  // substance in pM
  species EpoR in default = init_Epo*init_EpoR_rel;  // substance in pM
  species Epo_EpoR in default = 0;  // substance in pM
  species Epo_EpoR_i in default = 0;  // substance in pM
  species dEpo_i in default = 0;  // substance in pM
  species dEpo_e in default = 0;  // substance in pM

  // Parameters:
  init_Epo = 2187.762;
  init_EpoR = init_Epo*init_EpoR_rel;
  init_Epo_EpoR = ;
  init_Epo_EpoR_i = ;
  init_dEpo_e = ;
  init_dEpo_i = ;
  kde = 0.02238721;
  kdi = 0.0009772372;
  ke = 0.06025596;
  kex = 0.0005754399;
  koff = 0.07943282;
  kon_model = kon/init_Epo;
  kt = 0.02290868;
  init_EpoR_rel = 0.06309573;
  kon = 0.08709636;

  // Reactions:
  v1_v_0: Epo + EpoR => Epo_EpoR; Epo*EpoR*kon_model;
  v2_v_1: Epo_EpoR => Epo + EpoR; Epo_EpoR*koff;
  v3_v_2: => EpoR; init_EpoR*kt;
  v4_v_3: EpoR => ; EpoR*kt;
  v5_v_4: Epo_EpoR => Epo_EpoR_i; Epo_EpoR*ke;
  v6_v_5: Epo_EpoR_i => Epo + EpoR; Epo_EpoR_i*kex;
  v7_v_6: Epo_EpoR_i => dEpo_i; Epo_EpoR_i*kdi;
  v8_v_7: Epo_EpoR_i => dEpo_e; Epo_EpoR_i*kde;

  // Unit definitions:
  unit time = 60 second;
end
