// SBML level 2 version 4

model Beer_RS17()

  // Compartments:
  compartment medium = 1 ml;

  // Species:
  species Bac in medium = init_Bac;  // substance in au
  species Glu in medium = 10;  // substance in au
  species cGlu in medium = 0;  // substance in au
  species Ind in medium = 0;  // substance in au

  // Parameters:
  Bacmax = ;
  Beta = ;
  init_Bac = 0.007585776;
  init_Glu = ;
  init_Ind = ;
  init_cGlu = ;
  kdegi = ;
  kdim = ;
  ksyn = ;
  tau = ;
  lag has units;

  // Assignment rules:
  lag := piecewise(0, time - tau < 0, 1);

  // Reactions:
  reaction1: => Bac; medium*(-(Bac*Beta*lag*(Bac - Bacmax))/Bacmax);
  reaction2: => Glu; medium*(-Bac)*Glu*ksyn;  // modifiers: Bac
  reaction3: => cGlu; medium*(Bac*Glu*ksyn - cGlu^2*kdim);  // modifiers: Bac, Glu
  reaction4: => Ind; medium*(cGlu^2*kdim - Ind*kdegi);  // modifiers: cGlu

  // Unit definitions:
  unit time = 60 second;
end
