// SBML level 2 version 4

model Boehm_RS10()

  // Compartments:
  compartment cyt = 1.4 pl;
  compartment nuc = 0.45 pl;

  // Species:
  species STAT5A in cyt = 207.6*ratio;  // substance in nM
  species STAT5B in cyt = 207.6 - 207.6*ratio;  // substance in nM
  species pApB in cyt = 0;  // substance in nM
  species pApA in cyt = 0;  // substance in nM
  species pBpB in cyt = 0;  // substance in nM
  species nucpApA in nuc = 0;  // substance in nM
  species nucpApB in nuc = 0;  // substance in nM
  species nucpBpB in nuc = 0;  // substance in nM

  // Parameters:
  Epo_degradation_BaF3 = 0.05128614;
  epo_level = ;
  init_STAT5A = ;
  init_STAT5B = ;
  init_nucpApA = ;
  init_nucpApB = ;
  init_nucpBpB = ;
  init_pApA = ;
  init_pApB = ;
  init_pBpB = ;
  k_exp_hetero = 1.698244e-5;
  k_exp_homo = 0.004466836;
  k_imp_hetero = 0.009549926;
  k_imp_homo = 120226.4;
  k_phos = 15135.61;
  ratio = 0.693;

  // Assignment rules:
  BaF3_Epo := epo_level*exp(-Epo_degradation_BaF3*time);

  // Reactions:
  v1_v_0: 2 STAT5A => pApA; cyt*BaF3_Epo*STAT5A^2*k_phos;
  v2_v_1: STAT5A + STAT5B => pApB; cyt*BaF3_Epo*STAT5A*STAT5B*k_phos;
  v3_v_2: 2 STAT5B => pBpB; cyt*BaF3_Epo*STAT5B^2*k_phos;
  v4_v_3: pApA => nucpApA; cyt*k_imp_homo*pApA;
  v5_v_4: pApB => nucpApB; cyt*k_imp_hetero*pApB;
  v6_v_5: pBpB => nucpBpB; cyt*k_imp_homo*pBpB;
  v7_v_6: nucpApA => 2 STAT5A; nuc*k_exp_homo*nucpApA;
  v8_v_7: nucpApB => STAT5A + STAT5B; nuc*k_exp_hetero*nucpApB;
  v9_v_8: nucpBpB => 2 STAT5B; nuc*k_exp_homo*nucpBpB;

  // Unit definitions:
  unit time = 60 second;
  unit nM = 1e-9 mole;
  unit pl = 1e-12 litre;
end
