// SBML level 2 version 4

model Brannmark_RS21()

  // Compartments:
  compartment cyt = 1 pl;

  // Species:
  species IR in cyt = 10;  // substance in nM
  species IRins in cyt = 0;  // substance in nM
  species IRp in cyt = 0;  // substance in nM
  species IRiP in cyt = 0;  // substance in nM
  species IRi in cyt = 0;  // substance in nM
  species IRS in cyt = 10;  // substance in nM
  species IRSiP in cyt = 0;  // substance in nM
  species XX in cyt = 10;  // substance in nM
  species XXp in cyt = 0;  // substance in nM

  // Parameters:
  init_IR = ;
  init_IRS = ;
  init_IRSiP = ;
  init_IRi = ;
  init_IRiP = ;
  init_IRins = ;
  init_IRp = ;
  init_XX = ;
  init_XXp = ;
  insulin_dose_1 = ;
  insulin_dose_2 = ;
  insulin_time_1 = ;
  insulin_time_2 = ;
  k1a = 0.08912509;
  k1aBasic = 0.0002398833;
  k1b = 0.1061696;
  k1c = 0.03235937;
  k1d = 436515.8;
  k1e = 1.548817e-6;
  k1f = 954992.6;
  k1g = 2344.229;
  k1r = 0.02398833;
  k21 = 1.442115;
  k22 = 398.1072;
  k3 = 3.715352e-5;
  km2 = 0.6637431;
  km3 = 0.4395416;
  insulin has nM;

  // Assignment rules:
  insulin := insulin_dose_1*piecewise(0, time - insulin_time_1 < 0, 1) + insulin_dose_2*piecewise(0, time - insulin_time_2 < 0, 1);

  // Reactions:
  v1_v_0: IR => IRins; cyt*(IR*k1aBasic + IR*insulin*k1a);
  v2_v_1: IRins => IR; cyt*IRins*k1b;
  v3_v_2: IRins => IRp; cyt*IRins*k1c;
  v4_v_3: IRp => IRiP; cyt*IRp*k1d;
  v5_v_4: IRiP => IRi; cyt*IRiP*(k1e + XXp*k1f/(XXp + 1));  // modifiers: XXp
  v6_v_5: IRp => IR; cyt*IRp*k1g;
  v7_v_6: IRi => IR; cyt*IRi*k1r;
  v8_v_7: IRS => IRSiP; cyt*IRS*k21*(IRp + IRiP*k22);  // modifiers: IRiP, IRp
  v9_v_8: IRSiP => IRS; cyt*IRSiP*km2;
  v10_v_9: XX => XXp; cyt*IRSiP*XX*k3;  // modifiers: IRSiP
  v11_v_10: XXp => XX; cyt*XXp*km3;

  // Unit definitions:
  unit time = 60 second;
  unit nM = 1e-9 mole;
  unit pl = 1e-12 litre;
end
