// SBML level 2 version 4

model Bruno_RS06()

  // Compartments:
  compartment cyt = 1 pl;

  // Species:
  species bcar in cyt = init_bcar; bcar is "beta-carotin";  // substance in nM
  species bcry in cyt = init_bcry;  // substance in nM
  species b10 in cyt = init_b10; b10 is "beta-10";  // substance in nM
  species bio in cyt = init_bio; bio is "beta-io";  // substance in nM
  species ohb10 in cyt = init_ohb10; ohb10 is "OH-beta-10";  // substance in nM
  species ohbio in cyt = init_ohbio; ohbio is "OH-beta-io";  // substance in nM
  species zea in cyt = init_zea;  // substance in nM

  // Parameters:
  init_b10 = 2.666859;
  init_bcar = ;
  init_bcry = 4.083194;
  init_bio = ;
  init_ohb10 = 2.483133;
  init_ohbio = ;
  init_zea = 3.191538;
  k5 = 0.004466836;
  kb1 = 0.009120108;
  kb2 = 0.008317638;
  kc1 = 0.002041738;
  kc2 = 0.005011872;
  kc4 = 0.004786301;

  // Reactions:
  v1_ReactionName: bcar => b10 + bio; cyt*bcar*kb1;
  v2_ReactionName: b10 => bio; cyt*b10*kb2;
  v3_ReactionName: bcry => b10 + ohbio; cyt*bcry*kc1;
  v4_ReactionName: bcry => bio + ohb10; cyt*bcry*kc2;
  v5_ReactionName: ohb10 => ohbio; cyt*kc4*ohb10;
  v6_ReactionName: zea => ohb10 + ohbio; cyt*k5*zea;

  // Unit definitions:
  unit time = 60 second;
  unit nM = 1e-9 mole;
  unit pl = 1e-12 litre;
end
