// SBML level 2 version 4

model Crauste_RS32()

  // Compartments:
  compartment default = 1;

  // Species:
  species Naive in default = 8090;  // substance in number
  species EarlyEffector in default = 0;  // substance in number
  species LateEffector in default = 0;  // substance in number
  species Memory in default = 0;  // substance in number
  species Pathogen in default = 1;  // substance in number

  // Parameters:
  delta_EL = 0.6776415;
  delta_LM = 0.02818383;
  delta_NE = 0.008128305;
  init_EarlyEffector = ;
  init_LateEffector = ;
  init_Memory = ;
  init_Naive = ;
  init_Pathogen = ;
  mu_EE = 3.981072e-5;
  mu_LE = 1.659587e-10;
  mu_LL = 1.096478e-5;
  mu_N = 0.5370318;
  mu_P = 1.202264e-5;
  mu_PE = 7.943282e-11;
  mu_PL = 2.691535e-5;
  rho_E = 0.4602566;
  rho_P = 0.07943282;

  // Reactions:
  v1_v_0: Naive => ; Naive*mu_N;
  v2_v_1: Naive => EarlyEffector; Naive*Pathogen*delta_NE;  // modifiers: Pathogen
  v3_v_2: => EarlyEffector; EarlyEffector*Pathogen*rho_E;  // modifiers: Pathogen
  v4_v_3: EarlyEffector => ; EarlyEffector^2*mu_EE;
  v5_v_4: EarlyEffector => LateEffector; EarlyEffector*delta_EL;
  v6_v_5: LateEffector => ; LateEffector^2*mu_LL;
  v7_v_6: LateEffector => ; EarlyEffector*LateEffector*mu_LE;  // modifiers: EarlyEffector
  v8_v_7: LateEffector => Memory; LateEffector*delta_LM;
  v9_v_8: => Pathogen; Pathogen^2*rho_P;
  v10_v_9: Pathogen => ; EarlyEffector*Pathogen*mu_PE;  // modifiers: EarlyEffector
  v11_v_10: Pathogen => ; LateEffector*Pathogen*mu_PL;  // modifiers: LateEffector
  v12_v_11: Pathogen => ; Pathogen*mu_P;

  // Unit definitions:
  unit time = 3600 second;
end
