// SBML level 2 version 4

model Elowitz_RS12()

  // Compartments:
  compartment cell = 1;

  // Species:
  species X_protein in cell = init_X_protein; X_protein is "LacI protein";
  species Y_protein in cell = init_Y_protein; Y_protein is "TetR protein";
  species Z_protein in cell = init_Z_protein; Z_protein is "cI protein";
  species GFP in cell = init_GFP;
  species X_mRNA in cell = init_X_mRNA; X_mRNA is "LacI mRNA";
  species Y_mRNA in cell = init_Y_mRNA; Y_mRNA is "TetR mRNA";
  species Z_mRNA in cell = init_Z_mRNA; Z_mRNA is "cI mRNA";
  species GFP_mRNA in cell = init_GFP_mRNA;

  // Parameters:
  KM = 3.926449;
  a0_tr = tps_repr*60;
  a_tr = (tps_active - tps_repr)*60;
  init_GFP = 0.003019952;
  init_GFP_mRNA = 6.025596e-6;
  init_X_mRNA = 97.72372;
  init_X_protein = 0.7585776;
  init_Y_mRNA = 912.0108;
  init_Y_protein = 1023.293;
  init_Z_mRNA = 331.1311;
  init_Z_protein = 5.495409e-5;
  k_tl = eff/tau_mRNA;
  k_tl_GFP = eff_GFP/tau_mRNA_GFP;
  kd_mRNA = 0.6931/tau_mRNA;
  kd_mRNA_GFP = 0.6931/tau_mRNA_GFP;
  kd_prot = 0.6931/tau_prot;
  kd_prot_GFP = 0.6931/tau_prot_GFP;
  n_Hill = 1.999862;
  eff = 22.90868;
  eff_GFP = 1;
  tau_mRNA = 0.7726806;
  tau_mRNA_GFP = 0.008128305;
  tau_prot = 20.41738;
  tau_prot_GFP = 43.65158;
  tps_active = 104.7129;
  tps_repr = 0.0007943282;

  // Reactions:
  v1_v_0: X_mRNA => ; cell*X_mRNA*kd_mRNA;
  v2_v_1: Y_mRNA => ; cell*Y_mRNA*kd_mRNA;
  v3_v_2: Z_mRNA => ; cell*Z_mRNA*kd_mRNA;
  v4_v_3: GFP_mRNA => ; cell*GFP_mRNA*kd_mRNA_GFP;
  v5_v_4: => X_protein; cell*X_mRNA*k_tl;  // modifiers: X_mRNA
  v6_v_5: => Y_protein; cell*Y_mRNA*k_tl;  // modifiers: Y_mRNA
  v7_v_6: => Z_protein; cell*Z_mRNA*k_tl;  // modifiers: Z_mRNA
  v8_v_7: => GFP; cell*GFP_mRNA*k_tl_GFP;  // modifiers: GFP_mRNA
  v9_v_8: X_protein => ; cell*X_protein*kd_prot;
  v10_v_9: Y_protein => ; cell*Y_protein*kd_prot;
  v11_v_10: Z_protein => ; cell*Z_protein*kd_prot;
  v12_v_11: GFP => ; cell*GFP*kd_prot_GFP;
  v13_v_12: => X_mRNA; cell*(a0_tr + KM^n_Hill*a_tr/(KM^n_Hill + Z_protein^n_Hill));  // modifiers: Z_protein
  v14_v_13: => Y_mRNA; cell*(a0_tr + KM^n_Hill*a_tr/(KM^n_Hill + X_protein^n_Hill));  // modifiers: X_protein
  v15_v_14: => Z_mRNA; cell*(a0_tr + KM^n_Hill*a_tr/(KM^n_Hill + Y_protein^n_Hill));  // modifiers: Y_protein
  v16_v_15: => GFP; cell*(a0_tr + KM^n_Hill*a_tr/(KM^n_Hill + X_protein^n_Hill));  // modifiers: X_protein

  // Unit definitions:
  unit time = 60 second;
end
