// SBML level 2 version 4

model Fujita_RS15()

  // Compartments:
  compartment Cell = 1;

  // Species:
  species EGFR in Cell = init_EGFR;
  species pEGFR in Cell = 0;
  species pEGFR_Akt in Cell = 0;
  species Akt in Cell = init_Akt;
  species pAkt in Cell = 0;
  species S6 in Cell = init_S6;
  species pAkt_S6 in Cell = 0;
  species pS6 in Cell = 0;
  species EGF_EGFR in Cell = 0;

  // Parameters:
  EGFR_turnover = 0.001584893;
  EGF_conc_impulse = ;
  EGF_conc_ramp = ;
  EGF_conc_step = ;
  init_Akt = 0.03162278;
  init_EGFR = 3.090295e7;
  init_EGF_EGFR = ;
  init_S6 = 151.3561;
  init_pAkt = ;
  init_pAkt_S6 = ;
  init_pEGFR = ;
  init_pEGFR_Akt = ;
  init_pS6 = ;
  pro_EGFR = 6.819e4;
  pulse_time = ;
  ramp_time = ;
  reaction_1_k1 = 0.004265795;
  reaction_1_k2 = 0.003467369;
  reaction_2_k1 = 0.0005370318;
  reaction_2_k2 = 39810.72;
  reaction_3_k1 = 0.4139997;
  reaction_4_k1 = 0.01584893;
  reaction_5_k1 = 1.949845e-6;
  reaction_5_k2 = 0.0003801894;
  reaction_6_k1 = 6.025596e-6;
  reaction_7_k1 = 0.006025596;
  reaction_8_k1 = 0.0007585776;
  reaction_9_k1 = 0.03801894;
  scaleFactor_pAkt = 35.48134;
  scaleFactor_pEGFR = 6.309573e-8;
  scaleFactor_pS6 = 95499.26;

  // Assignment rules:
  EGF := EGF_conc_step + EGF_conc_impulse*piecewise(0, time - pulse_time < 0, 1) + EGF_conc_ramp*time/ramp_time;

  // Reactions:
  v1_reaction_1: EGFR -> EGF_EGFR; Cell*(EGF*EGFR*reaction_1_k1 - EGF_EGFR*reaction_1_k2);
  v2_reaction_2: pEGFR + Akt -> pEGFR_Akt; Cell*(Akt*pEGFR*reaction_2_k1 - pEGFR_Akt*reaction_2_k2);
  v3_reaction_3: pEGFR_Akt => pEGFR + pAkt; Cell*pEGFR_Akt*reaction_3_k1;
  v4_reaction_4: pEGFR => ; Cell*pEGFR*reaction_4_k1;
  v5_reaction_5: pAkt + S6 -> pAkt_S6; Cell*(S6*pAkt*reaction_5_k1 - pAkt_S6*reaction_5_k2);
  v6_reaction_6: pAkt_S6 => pAkt + pS6; Cell*pAkt_S6*reaction_6_k1;
  v7_reaction_7: pAkt => Akt; Cell*pAkt*reaction_7_k1;
  v8_reaction_8: pS6 => S6; Cell*pS6*reaction_8_k1;
  v9_reaction_9: EGF_EGFR => pEGFR; Cell*EGF_EGFR*reaction_9_k1;
  v10_reaction_10: EGFR => ; Cell*EGFR*EGFR_turnover;
  v11_reaction_11: => EGFR; Cell*EGFR_turnover*pro_EGFR;

  // Unit definitions:
  unit time = 60 second;
end
