// SBML level 2 version 4

model Hass_RS15()

  // Compartments:
  compartment DefaultCompartment = 1;

  // Species:
  species ApoER2_Dab1 in DefaultCompartment = init_ApoER2_Dab1;  // substance in au
  species ApoER2_Dab1SFK in DefaultCompartment = init_ApoER2_Dab1SFK;  // substance in au
  species ApoER2_Dab1SFKInh in DefaultCompartment = 0;  // substance in au
  species pApoER2_re_Dab1 in DefaultCompartment = 0;  // substance in au
  species ApoER2_re_Dab1 in DefaultCompartment = 0;  // substance in au
  species ApoER2_re_Dab1SFK in DefaultCompartment = 0;  // substance in au
  species ApoER2_re_Dab1SFKInh in DefaultCompartment = 0;  // substance in au
  species ApoER2_Dab1_released in DefaultCompartment = ApoER2_Dab1_SFK_release*init_ApoER2_Dab1SFK/(ApoER2_Dab1_SFK_degrad + ApoER2_Dab1_SFK_recycle);  // substance in au
  species SFK in DefaultCompartment = ApoER2_Dab1_SFK_release*init_ApoER2_Dab1SFK/(ApoER2_Dab1_bind_SFK*init_ApoER2_Dab1);  // substance in au

  // Parameters:
  ApoER2_Dab1_SFK_degrad = 0.01096478;
  ApoER2_Dab1_SFK_recycle = 2.355049;
  ApoER2_Dab1_SFK_release = 1949.845;
  ApoER2_Dab1_act = 10000;
  ApoER2_Dab1_bind_SFK = 208.9296;
  ApoER2_Dab1_bind_SFK_Reelin = 251188.6;
  Dab1_bind_Reelin = 0.009332543;
  Dab1_prod = ApoER2_Dab1_SFK_release*init_ApoER2_Dab1SFK*ApoER2_Dab1_SFK_degrad/(ApoER2_Dab1_SFK_degrad + ApoER2_Dab1_SFK_recycle);
  Dab1_release = 0.07585776;
  Inh = ;
  Reelin_input = ;
  SFK_inhibition_ratio = 0.8120822;
  init_ApoER2_Dab1 = 1;
  init_ApoER2_Dab1SFK = 0.0001258925;
  init_ApoER2_Dab1SFKInh = ;
  init_ApoER2_Dab1_released = ;
  init_ApoER2_re_Dab1 = ;
  init_ApoER2_re_Dab1SFK = ;
  init_ApoER2_re_Dab1SFKInh = ;
  init_SFK = ;
  init_pApoER2_re_Dab1 = ;

  // Assignment rules:
  Reelin_step := Reelin_input*exp(-(0.1*time)/(1000*Reelin_input + 1e-8))*piecewise(0, time < 0, 1);

  // Reactions:
  v1_v_ApoER2_Dab1_prod: => ApoER2_Dab1; Dab1_prod;
  v2_v_ApoER2_Dab1_bind_SFK: ApoER2_Dab1 + SFK => ApoER2_Dab1SFK; ApoER2_Dab1*ApoER2_Dab1_bind_SFK*SFK*(Inh*SFK_inhibition_ratio - Inh + 1);
  v3_v_ApoER2_Dab1_SFKInh_bind: ApoER2_Dab1 + SFK => ApoER2_Dab1SFKInh; -ApoER2_Dab1*ApoER2_Dab1_bind_SFK*Inh*SFK*(SFK_inhibition_ratio - 1);
  v4_v_ApoER2_Dab1_SFK_release: ApoER2_Dab1SFK => ApoER2_Dab1_released + SFK; ApoER2_Dab1SFK*ApoER2_Dab1_SFK_release;
  v5_v_ApoER2_Dab1_SFKInh_unbind: ApoER2_Dab1SFKInh => ApoER2_Dab1 + SFK; ApoER2_Dab1SFKInh*SFK_inhibition_ratio/ApoER2_Dab1_act;
  v6_v_ApoER2_Dab1SFK_bind_Reelin: ApoER2_Dab1SFK => ApoER2_re_Dab1SFK; ApoER2_Dab1SFK*Dab1_bind_Reelin*Reelin_step;
  v7_v_ApoER2_Dab1SFKInh_bind_Reelin: ApoER2_Dab1SFKInh => ApoER2_re_Dab1SFKInh; ApoER2_Dab1SFKInh*Dab1_bind_Reelin*Reelin_step;
  v8_v_ApoER2_re_Dab1_activation: ApoER2_re_Dab1 => pApoER2_re_Dab1; ApoER2_re_Dab1*ApoER2_Dab1_act*ApoER2_re_Dab1SFK/SFK_inhibition_ratio;  // modifiers: ApoER2_re_Dab1SFK
  v9_v_ApoER2_Dab1_bind_Reelin: ApoER2_Dab1 => ApoER2_re_Dab1; ApoER2_Dab1*Dab1_bind_Reelin*Reelin_step;
  v10_v_ApoER2_Dab1_bind_SFK_Reelin: ApoER2_Dab1 + SFK => ApoER2_re_Dab1SFK; ApoER2_Dab1*ApoER2_Dab1_bind_SFK_Reelin*Reelin_step*SFK*(Inh*SFK_inhibition_ratio - Inh + 1);
  v11_v_ApoER2_Dab1_bind_SFKInh_Reelin: ApoER2_Dab1 + SFK => ApoER2_re_Dab1SFKInh; -ApoER2_Dab1*ApoER2_Dab1_bind_SFK_Reelin*Inh*Reelin_step*SFK*(SFK_inhibition_ratio - 1);
  v12_v_ApoER2_re_Dab1SFKInh_unbind: ApoER2_re_Dab1SFKInh => ApoER2_Dab1 + SFK; ApoER2_re_Dab1SFKInh*SFK_inhibition_ratio/ApoER2_Dab1_act;
  v13_v_pApoER2_re_Dab1_release: pApoER2_re_Dab1 => ApoER2_Dab1_released; Dab1_release*pApoER2_re_Dab1;
  v14_v_ApoER2_re_Dab1SFK_release: ApoER2_re_Dab1SFK => ApoER2_Dab1_released + SFK; ApoER2_re_Dab1SFK*ApoER2_Dab1_SFK_release;
  v15_v_Dab1_released_degrad: ApoER2_Dab1_released => ; ApoER2_Dab1_released*ApoER2_Dab1_SFK_degrad;
  v16_v_Dab1_released_recycle: ApoER2_Dab1_released => ApoER2_Dab1; ApoER2_Dab1_released*ApoER2_Dab1_SFK_recycle;

  // Unit definitions:
  unit time = 60 second;
end
