// SBML level 2 version 4

model Isensee_RS37()

  // Compartments:
  compartment cyt = 1 pl;
  compartment nuc = 1 pl;

  // Species:
  species AC in cyt = AC_total;
  species pAC in cyt = 0;
  species AC_Fsk in cyt = 0; AC_Fsk is "AC:Fsk";
  species pAC_Fsk in cyt = 0; pAC_Fsk is "pAC:Fsk";
  species cAMP in cyt = 0;
  species Csub in cyt = 0;
  species Csub_H89 in cyt = 0; Csub_H89 is "C:H89";
  species RII_C_2 in cyt = 0; RII_C_2 is "RII_2:C_2";
  species RIIp_C_2 in cyt = RII2_total; RIIp_C_2 is "pRII_2:C_2";
  species RIIp_cAMP_C_2 in cyt = 0; RIIp_cAMP_C_2 is "pRII_2:C_2:cAMP_4";
  species RIIp_cAMP_2 in cyt = 0; RIIp_cAMP_2 is "pRII_2:cAMP_4";
  species Sp8_Br_cAMPS in cyt = 0; Sp8_Br_cAMPS is "Sp8-Br-cAMPS";
  species Rp8_Br_cAMPS in cyt = 0; Rp8_Br_cAMPS is "Rp-8-Br-cAMPS";
  species Rp8_pCPT_cAMPS in cyt = 0; Rp8_pCPT_cAMPS is "Rp-8-pCPT-cAMPS";
  species Rp_cAMPS in cyt = 0; Rp_cAMPS is "Rp-cAMPS";
  species RIIp_Rp8_Br_cAMPS_C_2 in cyt = 0; RIIp_Rp8_Br_cAMPS_C_2 is "pRII_2:C_2:Rp-8-Br-cAMPS_4";
  species RIIp_Rp8_pCPT_cAMPS_C_2 in cyt = 0; RIIp_Rp8_pCPT_cAMPS_C_2 is "pRII_2:C_2:Rp-8-pCPT-cAMPS_4";
  species RIIp_Rp_cAMPS_C_2 in cyt = 0; RIIp_Rp_cAMPS_C_2 is "pRII_2:C_2:Rp-cAMPS_4";
  species RIIp_Sp8_Br_cAMPS_C_2 in cyt = 0; RIIp_Sp8_Br_cAMPS_C_2 is "pRII_2:C_2:Sp-8-Br-cAMPS_4";
  species RIIp_Sp8_Br_cAMPS_2 in cyt = 0; RIIp_Sp8_Br_cAMPS_2 is "pRII_2:Sp-8-Br-cAMPS_4";
  species RIIp_2 in cyt = 0; RIIp_2 is "pRII_2";
  species RII_2 in cyt = 0;
  species IBMX in cyt = 0;
  species PDE in cyt = PDE_total;
  species pPDE in cyt = 0;

  // Parameters:
  DMSO_level = ;
  DMSO_time = ;
  Fsk_level = ;
  Fsk_time = ;
  H89_level = ;
  H89_time = ;
  IBMX_level = ;
  IBMX_time = ;
  KD_Fsk = 11.74898;
  KD_H89 = 0.05495409;
  KD_IBMX = 12.58925;
  KD_PDE_Csub = 0;
  KD_cAMP = 3.265878;
  Rp8_Br_cAMPS_pAB_level = ;
  Rp8_Br_cAMPS_pAB_time = ;
  Rp8_pCPT_cAMPS_pAB_level = ;
  Rp8_pCPT_cAMPS_pAB_time = ;
  Rp_cAMPS_pAB_level = ;
  Rp_cAMPS_pAB_time = ;
  Sp8_Br_cAMPS_AM_level = ;
  Sp8_Br_cAMPS_AM_time = ;
  fourABnOH_level = ;
  fourABnOH_time = ;
  init_AC = ;
  init_AC_Fsk = ;
  init_Csub = ;
  init_Csub_H89 = ;
  init_IBMX = ;
  init_PDE = ;
  init_RII_2 = ;
  init_RII_C_2 = ;
  init_RIIp_2 = ;
  init_RIIp_C_2 = ;
  init_RIIp_Rp8_Br_cAMPS_C_2 = ;
  init_RIIp_Rp8_pCPT_cAMPS_C_2 = ;
  init_RIIp_Rp_cAMPS_C_2 = ;
  init_RIIp_Sp8_Br_cAMPS_2 = ;
  init_RIIp_Sp8_Br_cAMPS_C_2 = ;
  init_RIIp_cAMP_2 = ;
  init_RIIp_cAMP_C_2 = ;
  init_Rp8_Br_cAMPS = ;
  init_Rp8_pCPT_cAMPS = ;
  init_Rp_cAMPS = ;
  init_Sp8_Br_cAMPS = ;
  init_cAMP = ;
  init_pAC = ;
  init_pAC_Fsk = ;
  init_pPDE = ;
  kdeg_cAMP = 8.317638e-6;
  kdeg_cAMP_free = 6.561453;
  kdp_AC = 0;
  kf_Fsk = 1412.538;
  kf_H89 = 0.0003981072;
  kf_PDE_Csub = 0;
  kf_RII_2__RII_C_2 = 0.8992905;
  kf_RII_C_2__RII_2 = 0.02691535;
  kf_RII_C_2__RIIp_C_2 = 0.02041738;
  kf_RIIp_2__RII_2 = 0.01819701;
  kf_RIIp_C_2__RII_C_2 = 0.02238721;
  kf_RIIp_cAMP_C_2__RIIp_2 = 0.1940886;
  kf_cAMP = 0.3531832;
  ki_IBMX = 1318.257;
  ki_Rp8_Br_cAMPS_pAB = 5.176068;
  ki_Rp8_pCPT_cAMPS_pAB = 8.279422;
  ki_Rp_cAMPS_pAB = 0.01862087;
  ki_Sp8_Br_cAMPS_AM = 0.07943282;
  kp_AC = 0;
  ks_AC_cAMP = 0.4954502;
  rel_open = 0.4436086;
  xi_AC_cAMP_Fsk = 1047.129;
  xi_KD_Rp8_Br_cAMPS = 0.05888437;
  xi_KD_Rp8_pCPT_cAMPS = 0.242661;
  xi_KD_Rp_cAMPS = 0.09549926;
  xi_KD_Sp8_Br_cAMPS = 0.3775722;
  xi_b_Rp8_Br_cAMPS = 0.07762471;
  xi_b_Rp8_pCPT_cAMPS = 0.01778279;
  xi_b_Rp_cAMPS = 0.3169567;
  xi_b_Sp8_Br_cAMPS = 14.12538;
  xi_i_Rp8_Br_cAMPS_pAB = 1;
  xi_i_Rp8_pCPT_cAMPS_pAB = 1;
  xi_i_Rp_cAMPS_pAB = 1;
  xi_i_Sp8_Br_cAMPS_AM = 1;
  xi_kf_RII_2__RII_C_2 = 0.03235937;
  xi_kf_RII_C_2__RII_2 = 1.039681;
  xi_pAC = 1;
  xi_pPDE = 1;
  xi_rel_open = 0.5152286;
  AC_total = 1;
  PDE_total = 1;
  RII2_total = 1;
  Fsk has nM;
  IBMXex has nM;
  DMSO has nM;
  H89 has nM;
  Sp8_Br_cAMPS_AM has nM;
  Rp8_Br_cAMPS_pAB has nM;
  Rp8_pCPT_cAMPS_pAB has nM;
  Rp_cAMPS_pAB has nM;
  fourABnOH has nM;

  // Assignment rules:
  Fsk := Fsk_level*piecewise(0, time - Fsk_time < 0, 1);
  IBMXex := IBMX_level*piecewise(0, time - IBMX_time < 0, 1);
  DMSO := DMSO_level*piecewise(0, time - DMSO_time < 0, 1);
  H89 := H89_level*piecewise(0, time - H89_time < 0, 1);
  Sp8_Br_cAMPS_AM := Sp8_Br_cAMPS_AM_level*piecewise(0, time - Sp8_Br_cAMPS_AM_time < 0, 1);
  Rp8_Br_cAMPS_pAB := Rp8_Br_cAMPS_pAB_level*piecewise(0, time - Rp8_Br_cAMPS_pAB_time < 0, 1);
  Rp8_pCPT_cAMPS_pAB := Rp8_pCPT_cAMPS_pAB_level*piecewise(0, time - Rp8_pCPT_cAMPS_pAB_time < 0, 1);
  Rp_cAMPS_pAB := Rp_cAMPS_pAB_level*piecewise(0, time - Rp_cAMPS_pAB_time < 0, 1);
  fourABnOH := fourABnOH_level*piecewise(0, time - fourABnOH_time < 0, 1);

  // Reactions:
  v1_v_0: => Sp8_Br_cAMPS; cyt*(-ki_Sp8_Br_cAMPS_AM)*(Sp8_Br_cAMPS - Sp8_Br_cAMPS_AM*xi_i_Sp8_Br_cAMPS_AM);
  v2_v_1: => Rp8_Br_cAMPS; cyt*(-ki_Rp8_Br_cAMPS_pAB)*(Rp8_Br_cAMPS - Rp8_Br_cAMPS_pAB*xi_i_Rp8_Br_cAMPS_pAB);
  v3_v_2: => Rp8_pCPT_cAMPS; cyt*(-ki_Rp8_pCPT_cAMPS_pAB)*(Rp8_pCPT_cAMPS - Rp8_pCPT_cAMPS_pAB*xi_i_Rp8_pCPT_cAMPS_pAB);
  v4_v_3: => Rp_cAMPS; cyt*(-ki_Rp_cAMPS_pAB)*(Rp_cAMPS - Rp_cAMPS_pAB*xi_i_Rp_cAMPS_pAB);
  v5_v_4: => IBMX; cyt*(-ki_IBMX)*(IBMX - IBMXex);
  v6_v_5: AC => AC_Fsk; cyt*AC*Fsk*kf_Fsk;
  v7_v_6: AC_Fsk => AC; cyt*AC_Fsk*KD_Fsk*kf_Fsk;
  v8_v_7: pAC => pAC_Fsk; cyt*Fsk*kf_Fsk*pAC;
  v9_v_8: pAC_Fsk => pAC; cyt*KD_Fsk*kf_Fsk*pAC_Fsk;
  v10_v_9: AC => pAC; cyt*AC*Csub*kp_AC;  // modifiers: Csub
  v11_v_10: AC_Fsk => pAC_Fsk; cyt*AC_Fsk*Csub*kp_AC;  // modifiers: Csub
  v12_v_11: pAC => AC; cyt*kdp_AC*pAC;
  v13_v_12: pAC_Fsk => AC_Fsk; cyt*kdp_AC*pAC_Fsk;
  v14_v_13: => cAMP; cyt*ks_AC_cAMP*(AC + pAC*xi_pAC);  // modifiers: AC, pAC
  v15_v_14: => cAMP; cyt*ks_AC_cAMP*xi_AC_cAMP_Fsk*(AC_Fsk + pAC_Fsk*xi_pAC);  // modifiers: AC_Fsk, pAC_Fsk
  v16_v_15: cAMP => ; cyt*(KD_IBMX*cAMP*kdeg_cAMP_free*(PDE + pPDE*xi_pPDE)/(IBMX + KD_IBMX));  // modifiers: IBMX, PDE, pPDE
  v17_v_16: RII_C_2 => Csub + RII_2; cyt*RII_C_2*kf_RII_C_2__RII_2;
  v18_v_17: Csub + RII_2 => RII_C_2; cyt*Csub*RII_2*kf_RII_2__RII_C_2;
  v19_v_18: RIIp_C_2 => Csub + RIIp_2; cyt*RIIp_C_2*kf_RII_C_2__RII_2*xi_kf_RII_C_2__RII_2;
  v20_v_19: Csub + RIIp_2 => RIIp_C_2; cyt*Csub*RIIp_2*kf_RII_2__RII_C_2*xi_kf_RII_2__RII_C_2;
  v21_v_20: RIIp_2 => RII_2; cyt*RIIp_2*kf_RIIp_2__RII_2;
  v22_v_21: RII_C_2 => RIIp_C_2; cyt*RII_C_2*kf_RII_C_2__RIIp_C_2;
  v23_v_22: RIIp_C_2 => RII_C_2; cyt*RIIp_C_2*kf_RIIp_C_2__RII_C_2;
  v24_v_23: RIIp_C_2 => RIIp_cAMP_C_2; cyt*RIIp_C_2*cAMP*kf_cAMP;  // modifiers: cAMP
  v25_v_24: RIIp_cAMP_C_2 => RIIp_C_2; cyt*KD_cAMP*RIIp_cAMP_C_2*kf_cAMP;
  v26_v_25: RIIp_cAMP_C_2 => RIIp_C_2; cyt*(KD_IBMX*RIIp_cAMP_C_2*kdeg_cAMP*(PDE + pPDE*xi_pPDE)/(IBMX + KD_IBMX));  // modifiers: IBMX, PDE, pPDE
  v27_v_26: RIIp_cAMP_C_2 => Csub + RIIp_cAMP_2; cyt*RIIp_cAMP_C_2*kf_RIIp_cAMP_C_2__RIIp_2;
  v28_v_27: RIIp_cAMP_2 => RIIp_2; cyt*KD_cAMP*RIIp_cAMP_2*kf_cAMP;
  v29_v_28: RIIp_cAMP_2 => RIIp_2; cyt*(KD_IBMX*RIIp_cAMP_2*kdeg_cAMP*(PDE + pPDE*xi_pPDE)/(IBMX + KD_IBMX));  // modifiers: IBMX, PDE, pPDE
  v30_v_29: RIIp_C_2 => RIIp_Rp8_Br_cAMPS_C_2; cyt*RIIp_C_2*Rp8_Br_cAMPS*kf_cAMP*xi_b_Rp8_Br_cAMPS;  // modifiers: Rp8_Br_cAMPS
  v31_v_30: RIIp_Rp8_Br_cAMPS_C_2 => RIIp_C_2; cyt*KD_cAMP*RIIp_Rp8_Br_cAMPS_C_2*kf_cAMP*xi_b_Rp8_Br_cAMPS*xi_KD_Rp8_Br_cAMPS;
  v32_v_31: RIIp_C_2 => RIIp_Rp8_pCPT_cAMPS_C_2; cyt*RIIp_C_2*Rp8_pCPT_cAMPS*kf_cAMP*xi_b_Rp8_pCPT_cAMPS;  // modifiers: Rp8_pCPT_cAMPS
  v33_v_32: RIIp_Rp8_pCPT_cAMPS_C_2 => RIIp_C_2; cyt*KD_cAMP*RIIp_Rp8_pCPT_cAMPS_C_2*kf_cAMP*xi_b_Rp8_pCPT_cAMPS*xi_KD_Rp8_pCPT_cAMPS;
  v34_v_33: RIIp_C_2 => RIIp_Rp_cAMPS_C_2; cyt*RIIp_C_2*Rp_cAMPS*kf_cAMP*xi_b_Rp_cAMPS;  // modifiers: Rp_cAMPS
  v35_v_34: RIIp_Rp_cAMPS_C_2 => RIIp_C_2; cyt*KD_cAMP*RIIp_Rp_cAMPS_C_2*kf_cAMP*xi_b_Rp_cAMPS*xi_KD_Rp_cAMPS;
  v36_v_35: RIIp_C_2 => RIIp_Sp8_Br_cAMPS_C_2; cyt*RIIp_C_2*Sp8_Br_cAMPS*kf_cAMP*xi_b_Sp8_Br_cAMPS;  // modifiers: Sp8_Br_cAMPS
  v37_v_36: RIIp_Sp8_Br_cAMPS_C_2 => RIIp_C_2; cyt*KD_cAMP*RIIp_Sp8_Br_cAMPS_C_2*kf_cAMP*xi_b_Sp8_Br_cAMPS*xi_KD_Sp8_Br_cAMPS;
  v38_v_37: RIIp_Sp8_Br_cAMPS_C_2 => Csub + RIIp_Sp8_Br_cAMPS_2; cyt*RIIp_Sp8_Br_cAMPS_C_2*kf_RIIp_cAMP_C_2__RIIp_2;
  v39_v_38: RIIp_Sp8_Br_cAMPS_2 => RIIp_2; cyt*KD_cAMP*RIIp_Sp8_Br_cAMPS_2*kf_cAMP*xi_b_Sp8_Br_cAMPS*xi_KD_Sp8_Br_cAMPS;
  v40_v_39: Csub => Csub_H89; cyt*Csub*H89*kf_H89;
  v41_v_40: Csub_H89 => Csub; cyt*Csub_H89*KD_H89*kf_H89;
  v42_v_41: PDE => pPDE; cyt*Csub*PDE*kf_PDE_Csub;  // modifiers: Csub
  v43_v_42: pPDE => PDE; cyt*KD_PDE_Csub*kf_PDE_Csub*pPDE;

  // Unit definitions:
  unit time = 60 second;
  unit nM = 1e-9 mole;
  unit pl = 1e-12 litre;
end
