// SBML level 2 version 4

model Merkle_RS34()

  // Compartments:
  compartment cyt = vol_cyt; cyt has pl;
  compartment nuc = vol_nuc; nuc has pl;

  // Species:
  species EpoRJAK2 in cyt = init_EpoRJAK2;  // substance in nM
  species EpoRpJAK2 in cyt = 0;  // substance in nM
  species pEpoRpJAK2 in cyt = 0;  // substance in nM
  species PTP in cyt = init_PTP;  // substance in nM
  species PTPAct in cyt = 0;  // substance in nM
  species STAT5 in cyt = init_STAT5;  // substance in nM
  species pSTAT5 in cyt = 0;  // substance in nM
  species nSTAT5 in nuc = 0;  // substance in nM
  species npSTAT5 in nuc = 0;  // substance in nM
  species CISHnRNA1 in nuc = CISHRNAeqm*CISHRNAbasal/CISHRNAdelay;  // substance in au
  species CISHnRNA2 in nuc = CISHRNAeqm*CISHRNAbasal/CISHRNAdelay;  // substance in au
  species CISHnRNA3 in nuc = CISHRNAeqm*CISHRNAbasal/CISHRNAdelay;  // substance in au
  species CISHnRNA4 in nuc = CISHRNAeqm*CISHRNAbasal/CISHRNAdelay;  // substance in au
  species CISHnRNA5 in nuc = CISHRNAeqm*CISHRNAbasal/CISHRNAdelay;  // substance in au
  species CISHRNA in cyt = init_CISHRNA;  // substance in au
  species CIS in cyt = init_CIS;  // substance in nM
  species SOCS3nRNA1 in nuc = init_SOCS3nRNA1;  // substance in au
  species SOCS3nRNA2 in nuc = init_SOCS3nRNA2;  // substance in au
  species SOCS3nRNA3 in nuc = init_SOCS3nRNA3;  // substance in au
  species SOCS3nRNA4 in nuc = init_SOCS3nRNA4;  // substance in au
  species SOCS3nRNA5 in nuc = init_SOCS3nRNA5;  // substance in au
  species SOCS3RNA in cyt = init_SOCS3RNA;  // substance in au
  species SOCS3 in cyt = init_SOCS3;  // substance in nM

  // Parameters:
  ActD = ;
  ActDstrength = 0.6729767;
  ActDstrength_val = ;
  CISHRNAbasal_model = CISHRNAeqm*CISHRNAbasal;
  CISHRNAdelay = 0.2679168;
  CISHRNAeqm_model = CISHRNAeqm/init_STAT5;
  CISHRNAturn = 0.06606934;
  CISeqm_model = CISeqm/CISHRNAeqm;
  CISinh_model = CISinh/CISeqm;
  CISturn = 0.00616595;
  EPORactJAK2 = 4.246196;
  JAK2EPORdeactPTP_model = JAK2EPORdeactPTP/init_PTP;
  JAK2actEPO = 1995262;
  PTPactEPOR_model = PTPactEPOR/init_EpoRJAK2;
  PTPdeact = 0.009332543;
  SOCS3RNAbasal_model = SOCS3RNAeqm*SOCS3RNAbasal;
  SOCS3RNAdelay = 0.09772372;
  SOCS3RNAeqm_model = SOCS3RNAeqm/init_STAT5^SOCS3prom;
  SOCS3RNAturn = 0.03715352;
  SOCS3eqmOE_model = SOCS3eqm*SOCS3eqmOE;
  SOCS3eqm_model = SOCS3eqm/SOCS3RNAeqm;
  SOCS3inh_model = SOCS3inh/SOCS3eqm;
  SOCS3oe = ;
  SOCS3prom = 1.432188;
  SOCS3turn = 8912.509;
  STAT5actEPOR_model = STAT5actEPOR/init_EpoRJAK2^2;
  STAT5actJAK2_model = STAT5actJAK2/init_EpoRJAK2;
  STAT5exp = 0.05888437;
  STAT5imp = 0.04265795;
  epo_level = ;
  init_CIS = ;
  init_CISHRNA = ;
  init_CISHnRNA1 = ;
  init_CISHnRNA2 = ;
  init_CISHnRNA3 = ;
  init_CISHnRNA4 = ;
  init_CISHnRNA5 = ;
  init_EpoRJAK2 = 2.760578;
  init_EpoRpJAK2 = ;
  init_PTP = 18.19701;
  init_PTPAct = ;
  init_SOCS3 = ;
  init_SOCS3RNA = ;
  init_SOCS3nRNA1 = ;
  init_SOCS3nRNA2 = ;
  init_SOCS3nRNA3 = ;
  init_SOCS3nRNA4 = ;
  init_SOCS3nRNA5 = ;
  init_STAT5 = 40.73803;
  init_nSTAT5 = ;
  init_npSTAT5 = ;
  init_pEpoRpJAK2 = ;
  init_pSTAT5 = ;
  isprediction = 0;
  nSTAT5deact = 0.09549926;
  step_time = ;
  CISHRNAbasal = 2.570396e-5;
  CISHRNAeqm = 1;
  CISeqm = 229.0868;
  CISinh = 1.230269e-5;
  JAK2EPORdeactPTP = 23988.33;
  PTPactEPOR = 1.698244e-5;
  SOCS3RNAbasal = 0.003981072;
  SOCS3RNAeqm = 1;
  SOCS3eqm = 75.85776;
  SOCS3eqmOE = 1.435489;
  SOCS3inh = 7.516229;
  STAT5actEPOR = 1.235947;
  STAT5actJAK2 = 0.01230269;

  // Assignment rules:
  Epo := epo_level;
  step_function := piecewise(0, time - step_time < 0, 1);

  // Reactions:
  v1_v_0: EpoRJAK2 => EpoRpJAK2; cyt*(Epo*EpoRJAK2*JAK2actEPO/(SOCS3*SOCS3inh_model + 1));  // modifiers: SOCS3
  v2_v_1: EpoRpJAK2 => EpoRJAK2; cyt*EpoRpJAK2*JAK2EPORdeactPTP_model*PTPAct;  // modifiers: PTPAct
  v3_v_2: EpoRpJAK2 => pEpoRpJAK2; cyt*(EPORactJAK2*EpoRpJAK2/(SOCS3*SOCS3inh_model + 1));  // modifiers: SOCS3
  v4_v_3: pEpoRpJAK2 => EpoRJAK2; cyt*JAK2EPORdeactPTP_model*PTPAct*pEpoRpJAK2;  // modifiers: PTPAct
  v5_v_4: PTP => PTPAct; cyt*PTP*PTPactEPOR_model*(EpoRpJAK2 + pEpoRpJAK2);  // modifiers: EpoRpJAK2, pEpoRpJAK2
  v6_v_5: PTPAct => PTP; cyt*PTPAct*PTPdeact;
  v7_v_6: STAT5 => pSTAT5; cyt*(STAT5*STAT5actJAK2_model*(EpoRpJAK2 + pEpoRpJAK2)/(SOCS3*SOCS3inh_model + 1));  // modifiers: EpoRpJAK2, SOCS3, pEpoRpJAK2
  v8_v_7: STAT5 => pSTAT5; cyt*(STAT5*STAT5actEPOR_model*pEpoRpJAK2^2/((CIS*CISinh_model + 1)*(SOCS3*SOCS3inh_model + 1)));  // modifiers: CIS, SOCS3, pEpoRpJAK2
  v9_v_8: pSTAT5 => npSTAT5; cyt*STAT5imp*pSTAT5;
  v10_v_9: npSTAT5 => nSTAT5; nuc*nSTAT5deact*npSTAT5;
  v11_v_10: nSTAT5 => STAT5; nuc*STAT5exp*nSTAT5;
  v12_v_11: => CISHnRNA1; nuc*CISHRNAbasal_model*(ActD*ActDstrength - 1)*(ActDstrength_val*isprediction*step_function - 1);
  v13_v_12: => CISHnRNA1; nuc*CISHRNAturn*CISHRNAeqm_model*npSTAT5*(ActD*ActDstrength - 1)*(ActDstrength_val*isprediction*step_function - 1);  // modifiers: npSTAT5
  v14_v_13: CISHnRNA1 => CISHnRNA2; nuc*CISHnRNA1*CISHRNAdelay;
  v15_v_14: CISHnRNA2 => CISHnRNA3; nuc*CISHnRNA2*CISHRNAdelay;
  v16_v_15: CISHnRNA3 => CISHnRNA4; nuc*CISHnRNA3*CISHRNAdelay;
  v17_v_16: CISHnRNA4 => CISHnRNA5; nuc*CISHnRNA4*CISHRNAdelay;
  v18_v_17: CISHnRNA5 => CISHRNA; nuc*CISHnRNA5*CISHRNAdelay;
  v19_v_18: CISHRNA => ; cyt*CISHRNA*CISHRNAturn;
  v20_v_19: => CIS; cyt*CISHRNA*CISturn*CISeqm_model;  // modifiers: CISHRNA
  v21_v_20: CIS => ; cyt*CIS*CISturn;
  v22_v_21: => SOCS3nRNA1; nuc*SOCS3RNAbasal_model*(ActD*ActDstrength - 1)*(ActDstrength_val*isprediction*step_function - 1);
  v23_v_22: => SOCS3nRNA1; nuc*SOCS3RNAturn*SOCS3RNAeqm_model*npSTAT5^SOCS3prom*(ActD*ActDstrength - 1)*(ActDstrength_val*isprediction*step_function - 1);  // modifiers: npSTAT5
  v24_v_23: SOCS3nRNA1 => SOCS3nRNA2; nuc*SOCS3nRNA1*SOCS3RNAdelay;
  v25_v_24: SOCS3nRNA2 => SOCS3nRNA3; nuc*SOCS3nRNA2*SOCS3RNAdelay;
  v26_v_25: SOCS3nRNA3 => SOCS3nRNA4; nuc*SOCS3nRNA3*SOCS3RNAdelay;
  v27_v_26: SOCS3nRNA4 => SOCS3nRNA5; nuc*SOCS3nRNA4*SOCS3RNAdelay;
  v28_v_27: SOCS3nRNA5 => SOCS3RNA; nuc*SOCS3nRNA5*SOCS3RNAdelay;
  v29_v_28: SOCS3RNA => ; cyt*SOCS3RNA*SOCS3RNAturn;
  v30_v_29: => SOCS3; cyt*SOCS3RNA*SOCS3turn*SOCS3eqm_model;  // modifiers: SOCS3RNA
  v31_v_30: SOCS3 => ; cyt*SOCS3*SOCS3turn;
  v32_v_31: => SOCS3; cyt*SOCS3oe*SOCS3turn*SOCS3eqmOE_model;

  // Unit definitions:
  unit time = 60 second;
  unit nM = 1e-9 mole;
  unit pl = 1e-12 litre;
end
