// SBML level 2 version 4

model Schwen_RS01()

  // Compartments:
  compartment ExtracellularMedium = 1;

  // Species:
  species Ins in ExtracellularMedium = init_Ins; Ins is "Insulin";  // substance in nM
  species Rec1 in ExtracellularMedium = ini_R1; Rec1 is "Receptors_low";  // substance in nM
  species Rec2 in ExtracellularMedium = ini_R1*ini_R2fold; Rec2 is "Receptors_high";  // substance in nM
  species IR1 in ExtracellularMedium = 0; IR1 is "IR_low";  // substance in nM
  species IR2 in ExtracellularMedium = 0; IR2 is "IR_high";  // substance in nM
  species IR1in in ExtracellularMedium = 0; IR1in is "IR_low_internalized";  // substance in nM
  species IR2in in ExtracellularMedium = 0; IR2in is "IR_high_internalized";  // substance in nM
  species Uptake1 in ExtracellularMedium = 0;  // substance in nM
  species Uptake2 in ExtracellularMedium = 0;  // substance in nM
  species InsulinFragments in ExtracellularMedium = 0;  // substance in nM
  species BoundUnspec in ExtracellularMedium = 0;  // substance in nM

  // Parameters:
  init_BoundUnspec = ;
  init_IR1 = ;
  init_IR1in = ;
  init_IR2 = ;
  init_IR2in = ;
  init_Ins = ;
  init_InsulinFragments = ;
  init_Rec1 = ;
  init_Rec2 = ;
  init_Uptake1 = ;
  init_Uptake2 = ;
  ka1 = 0.004168694;
  ka2fold = 4.055085;
  kd1 = 12.30269;
  kd2fold = 10.23293;
  kin = 0.3419794;
  kin2 = 0.7888601;
  koff_unspec = 5.701643;
  kon_unspec = 14.79108;
  kout = 0.02511886;
  kout2 = 0.02041738;
  kout_frag = 0.006309573;
  ini_R1 = 109.6478;
  ini_R2fold = 8.317638;

  // Reactions:
  v1_ka1: Ins + Rec1 => IR1; ExtracellularMedium*Ins*Rec1*ka1;
  v2_ka2fold: Ins + Rec2 => IR2; ExtracellularMedium*Ins*Rec2*ka1*ka2fold;
  v3_v_2: Ins => BoundUnspec; ExtracellularMedium*Ins*kon_unspec;
  v4_v_3: BoundUnspec => Ins; ExtracellularMedium*BoundUnspec*koff_unspec;
  v5_kd1: IR1 => Ins + Rec1; ExtracellularMedium*IR1*kd1;
  v6_kd2fold: IR2 => Ins + Rec2; ExtracellularMedium*IR2*kd1*kd2fold;
  v7_v_6: IR1 => IR1in; ExtracellularMedium*IR1*kin;
  v8_v_7: IR2 => IR2in; ExtracellularMedium*IR2*kin2;
  v9_v_8: IR1in => IR1; ExtracellularMedium*IR1in*kout;
  v10_v_9: IR2in => IR2; ExtracellularMedium*IR2in*kout2;
  v11_v_10: IR1in => Rec1 + InsulinFragments; ExtracellularMedium*IR1in*kout_frag;
  v12_v_11: IR2in => Rec2 + InsulinFragments; ExtracellularMedium*IR2in*kout_frag;
  v13_v_12: => Uptake1; ExtracellularMedium*(Ins*Rec1*ka1 - IR1*kd1);  // modifiers: IR1, Ins, Rec1
  v14_v_13: => Uptake2; ExtracellularMedium*(Ins*Rec2*ka1*ka2fold - IR2*kd1*kd2fold);  // modifiers: IR2, Ins, Rec2

  // Unit definitions:
  unit time = 60 second;
  unit nM = 1e-9 mole;
end
