// SBML level 2 version 4

model Sneyd_RS47()

  // Compartments:
  compartment membrane = 1 pl;

  // Species:
  species IPR_O in membrane = 0;  // substance in prob
  species IPR_R in membrane = 1;  // substance in prob
  species IPR_I1 in membrane = 0; IPR_I1 is "I_1";  // substance in prob
  species IPR_S in membrane = 0;  // substance in prob
  species IPR_A in membrane = 0;  // substance in prob
  species IPR_I2 in membrane = 0; IPR_I2 is "I_2";  // substance in prob

  // Parameters:
  Ca = ;
  IP3 = ;
  L1 = k_1/k1/(l_2/l2);
  L3 = k_2/k2/(l_4/l4);
  L5 = k_4/k4/(l_6/l6);
  init_IPR_A = ;
  init_IPR_I1 = ;
  init_IPR_I2 = ;
  init_IPR_O = ;
  init_IPR_R = ;
  init_IPR_S = ;
  k1 = 2.243882;
  k2 = 147910.8;
  k3 = 26.91535;
  k4 = 134896.3;
  k_1 = 1.770109;
  k_2 = 0.0005754399;
  k_3 = 1.625549;
  k_4 = 3715.352;
  l2 = 0.5284453;
  l4 = 5.623413;
  l6 = 147910.8;
  l_2 = 0.1327394;
  l_4 = 0.007762471;
  l_6 = 0.0008709636;

  // Reactions:
  v1_v_0: IPR_O => IPR_R; membrane*(IPR_O*(k_2 + Ca*l_4)/(Ca/L5 + 1));
  v2_v_1: IPR_R => IPR_O; membrane*(IP3*IPR_R*(Ca*l4 + L3*k2)/(L3 + Ca*(L3/L1 + 1)));
  v3_v_2: IPR_R => IPR_I1; membrane*(Ca*IPR_R*(l2 + L1*k1)/(L1 + Ca*(L1/L3 + 1)));
  v4_v_3: IPR_I1 => IPR_R; membrane*IPR_I1*(k_1 + l_2);
  v5_v_4: IPR_O => IPR_A; membrane*(Ca*IPR_O*(l6 + L5*k4)/(Ca + L5));
  v6_v_5: IPR_A => IPR_O; membrane*(IPR_A*L1*(k_4 + l_6)/(Ca + L1));
  v7_v_6: IPR_A => IPR_I2; membrane*(Ca*IPR_A*(l2 + L1*k1)/(Ca + L1));
  v8_v_7: IPR_I2 => IPR_A; membrane*IPR_I2*(k_1 + l_2);
  v9_v_8: IPR_O => IPR_S; membrane*(IPR_O*L5*k3/(Ca + L5));
  v10_v_9: IPR_S => IPR_O; membrane*IPR_S*k_3;

  // Unit definitions:
  unit time = second;
  unit pl = 1e-12 litre;
end
