// SBML level 2 version 4

model Sobotta_RS14()

  // Compartments:
  compartment cyt = 12.67 pl;
  compartment nuc = 0.5 pl;

  // Species:
  species JAK1_gp130 in cyt = gp130_pro/gp130_deg; JAK1_gp130 is "Unphosphorylated receptor";
  species pJAK1_gp130 in cyt = 0; pJAK1_gp130 is "Phosphorylated JAK1 receptor";  // substance in au
  species pJAK1_pgp130 in cyt = 0; pJAK1_pgp130 is "Active receptor";  // substance in au
  species STAT3 in cyt = 0; STAT3 is "Inactive cytoplasmic STAT3";
  species tpSTAT3 in cyt = 0; tpSTAT3 is "Active STAT3";
  species nSTAT3 in nuc = total_STAT3; nSTAT3 is "Inactive nuclear STAT3";
  species nSOCS3RNA1 in nuc = 0; nSOCS3RNA1 is "SOCS3 transcriptional delay";  // substance in au
  species nSOCS3RNA2 in nuc = 0; nSOCS3RNA2 is "SOCS3 transcriptional delay";  // substance in au
  species nSOCS3RNA3 in nuc = 0; nSOCS3RNA3 is "SOCS3 transcriptional delay";  // substance in au
  species nSOCS3RNA4 in nuc = 0; nSOCS3RNA4 is "SOCS3 transcriptional delay";  // substance in au
  species nSOCS3RNA5 in nuc = 0; nSOCS3RNA5 is "SOCS3 transcriptional delay";  // substance in au
  species SOCS3RNA in cyt = 0; SOCS3RNA is "SOCS3 mRNA";  // substance in au
  species SOCS3 in cyt = 0; SOCS3 is "SOCS3 protein";

  // Parameters:
  actd_level1 = 0;
  actd_t1 = -11;
  actd_t2 = -10;
  f_pstat3_imp = 5.61;
  gp130_act_jak1 = 0.4102041;
  gp130_deg = 0.005888437;
  gp130_pro = 0.001737801;
  il6_level1 = 0;
  il6_tStep = 0;
  init_JAK1_gp130 = ;
  init_SOCS3 = ;
  init_SOCS3RNA = ;
  init_STAT3 = ;
  init_nSOCS3RNA1 = ;
  init_nSOCS3RNA2 = ;
  init_nSOCS3RNA3 = ;
  init_nSOCS3RNA4 = ;
  init_nSOCS3RNA5 = ;
  init_nSTAT3 = ;
  init_pJAK1_gp130 = ;
  init_pJAK1_pgp130 = ;
  init_tpSTAT3 = ;
  input_actd = 0;
  input_il6 = 40;
  input_ruxolitinib = 0;
  input_stattic = 0;
  jak1_act_basal_model = jak1_act_basal/scale_pgp130_wb_bohl_hep_2005_07_26_Pulse5min;
  jak1_act_il6_model = jak1_act_il6/scale_pgp130_wb_bohl_hep_2005_07_26_Pulse5min;
  jak1_gp130_dea = 0.08317638;
  jak1_inh_ruxolitinib = 0.006309573;
  rux_degrade = 0.001380384;
  socs3_assoc = 0.01148154;
  socs3_des = 0.2811901;
  socs3_pro_model = socs3_pro*scale_socs3_qpcr_braun_hep_2013_07_08_qPCR_Socs3_Stat3;
  socs3rna_delay = 0.2387811;
  socs3rna_des = 0.2917427;
  socs3rna_hill = 1.7133;
  socs3rna_pro_model = socs3rna_pro/scale_socs3_qpcr_braun_hep_2013_07_08_qPCR_Socs3_Stat3;
  stat3_act_gp130_model = stat3_act_gp130*scale_pgp130_wb_bohl_hep_2005_07_26_Pulse5min;
  stat3_exp = 2.884032;
  stat3_imp = 0.05248075;
  stat3_inh_socs3 = 0.4083194;
  stat3_inh_stattic = 0.08912509;
  jak1_act_basal = 0.003235937;
  jak1_act_il6 = 0.0128825;
  scale_pgp130_wb_bohl_hep_2005_07_26_Pulse5min = 11.74898;
  scale_socs3_qpcr_braun_hep_2013_07_08_qPCR_Socs3_Stat3 = 61.6595;
  socs3_pro = 1.725838;
  socs3rna_pro = 0.001412538;
  stat3_act_gp130 = 0.3083188;
  total_STAT3 = 660.6934;

  // Assignment rules:
  IL6 := il6_level1 - piecewise(0, time - il6_tStep < 0, 1)*(il6_level1 - input_il6);
  ActD := actd_level1*piecewise(0, time - actd_t1 < 0, 1) - piecewise(0, time - actd_t2 < 0, 1)*(actd_level1 - input_actd);
  Stattic := input_stattic*piecewise(0, time + 60 < 0, 1);
  Ruxolitinib := input_ruxolitinib*piecewise(0, time + 60 < 0, 1)*exp(-rux_degrade*(time + 60));

  // Reactions:
  v1_Receptor_production: => JAK1_gp130; cyt*(-gp130_pro)*(ActD - 1);
  v2_Receptor_degradation: JAK1_gp130 => ; cyt*JAK1_gp130*gp130_deg;
  v3_Receptor_degradation: pJAK1_pgp130 => ; cyt*gp130_deg*pJAK1_pgp130;
  v4_Receptor_degradation: pJAK1_gp130 => ; cyt*gp130_deg*pJAK1_gp130;
  v5_Activation_of_the_JAK1_receptor: JAK1_gp130 => pJAK1_gp130; cyt*(JAK1_gp130*(jak1_act_basal_model + IL6*jak1_act_il6_model)/(Ruxolitinib*jak1_inh_ruxolitinib + 1));
  v6_Activation_of_the_gp130_subunit: pJAK1_gp130 => pJAK1_pgp130; cyt*(gp130_act_jak1*pJAK1_gp130/(Ruxolitinib*jak1_inh_ruxolitinib + 1));
  v7_Receptor_dephosphorylation: pJAK1_gp130 => JAK1_gp130; cyt*jak1_gp130_dea*pJAK1_gp130;
  v8_Receptor_dephosphorylation: pJAK1_pgp130 => JAK1_gp130; cyt*jak1_gp130_dea*pJAK1_pgp130;
  v9_SOCS3_mediated_degradation: JAK1_gp130 + SOCS3 => ; cyt*JAK1_gp130*SOCS3*socs3_assoc;
  v10_SOCS3_mediated_degradation: pJAK1_gp130 + SOCS3 => ; cyt*SOCS3*pJAK1_gp130*socs3_assoc;
  v11_SOCS3_mediated_degradation: pJAK1_pgp130 + SOCS3 => ; cyt*SOCS3*pJAK1_pgp130*socs3_assoc;
  v12_Import_of_unphosphorylated_STAT3: STAT3 => nSTAT3; cyt*STAT3*stat3_imp;
  v13_Export_of_unphosphorylated_STAT3: nSTAT3 => STAT3; nuc*nSTAT3*stat3_exp;
  v14_STAT3_phosphorylation_and_dimerization: STAT3 => tpSTAT3; cyt*(STAT3*pJAK1_pgp130*stat3_act_gp130_model/((SOCS3*stat3_inh_socs3 + 1)*(Stattic*stat3_inh_stattic + 1)));  // modifiers: SOCS3, pJAK1_pgp130
  v15_STAT3_import_and_deactivation: tpSTAT3 => nSTAT3; cyt*stat3_imp*tpSTAT3*(f_pstat3_imp + 1);
  v16_Initiation_of_SOCS3_mRNA_transcription: => nSOCS3RNA1; nuc*(-socs3rna_pro_model)*(ActD - 1)*(stat3_imp*tpSTAT3*vol_cyt*(f_pstat3_imp + 1)/vol_nuc)^socs3rna_hill;  // modifiers: tpSTAT3
  v17_Transcriptional_delay: nSOCS3RNA1 => nSOCS3RNA2; nuc*nSOCS3RNA1*socs3rna_delay;
  v18_Transcriptional_delay: nSOCS3RNA2 => nSOCS3RNA3; nuc*nSOCS3RNA2*socs3rna_delay;
  v19_Transcriptional_delay: nSOCS3RNA3 => nSOCS3RNA4; nuc*nSOCS3RNA3*socs3rna_delay;
  v20_Transcriptional_delay: nSOCS3RNA4 => nSOCS3RNA5; nuc*nSOCS3RNA4*socs3rna_delay;
  v21_Transcriptional_delay: nSOCS3RNA5 => SOCS3RNA; nuc*nSOCS3RNA5*socs3rna_delay;
  v22_SOCS3_mRNA_degradation: SOCS3RNA => ; cyt*SOCS3RNA*socs3rna_des;
  v23_SOCS3_mRNA_translation: => SOCS3; cyt*SOCS3RNA*socs3_pro_model;  // modifiers: SOCS3RNA
  v24_SOCS3_degradation: SOCS3 => ; cyt*SOCS3*socs3_des;

  // Unit definitions:
  unit time = 60 second;
  unit pl = 1e-12 litre;
end
