// SBML level 2 version 4

model Swameye_RS45()

  // Compartments:
  compartment cyt = 1.4 pl;
  compartment nuc = 0.45 pl;

  // Species:
  species STAT in cyt = init_STAT;  // substance in nM
  species pSTAT in cyt = 0;  // substance in nM
  species pSTAT_pSTAT in cyt = 0;  // substance in nM
  species npSTAT_npSTAT in nuc = 0;  // substance in nM
  species nSTAT1 in nuc = 0;  // substance in nM
  species nSTAT2 in nuc = 0;  // substance in nM
  species nSTAT3 in nuc = 0;  // substance in nM
  species nSTAT4 in nuc = 0;  // substance in nM
  species nSTAT5 in nuc = 0;  // substance in nM
  species EventTrigger_dummy in cyt = 0;

  // Parameters:
  init_STAT = 1;
  init_nSTAT1 = ;
  init_nSTAT2 = ;
  init_nSTAT3 = ;
  init_nSTAT4 = ;
  init_nSTAT5 = ;
  init_npSTAT_npSTAT = ;
  init_pSTAT = ;
  init_pSTAT_pSTAT = ;
  p1 = 3.491403;
  p2 = p2/init_STAT;
  p3 = 0.2213095;
  p4 = 0.7311391;
  sp1 = 0.002187762;
  sp2 = 0.4168694;
  sp3 = 0.7925013;
  sp4 = 0.6776415;
  sp5 = 4.265795e-5;
  pEpoR has au;
  spline_t_0 = 0 au;
  A = 0 au;
  B = 0 au;
  C = 0 au;
  D = 0 au;

  // Assignment rules:
  pEpoR := exp(A*(time - spline_t_0)^3 + B*(time - spline_t_0)^2 + C*(time - spline_t_0) + D);

  // Reactions:
  v1_v_0: STAT => pSTAT; cyt*STAT*p1*pEpoR;
  v2_v_1: 2 pSTAT => pSTAT_pSTAT; cyt*p2*pSTAT^2;
  v3_v_2: pSTAT_pSTAT => npSTAT_npSTAT; cyt*p3*pSTAT_pSTAT;
  v4_v_3: npSTAT_npSTAT => 2 nSTAT1; nuc*npSTAT_npSTAT*p4;
  v5_v_4: nSTAT1 => nSTAT2; nuc*nSTAT1*p4;
  v6_v_5: nSTAT2 => nSTAT3; nuc*nSTAT2*p4;
  v7_v_6: nSTAT3 => nSTAT4; nuc*nSTAT3*p4;
  v8_v_7: nSTAT4 => nSTAT5; nuc*nSTAT4*p4;
  v9_v_8: nSTAT5 => STAT; nuc*nSTAT5*p4;

  // Events:
  t_0_event: at (time >= 0): spline_t_0 = 0, A = 0.003087106, B = -0.148855, C = 1.717076, D = -6.124876;
  t_5_event: at (time >= 5): spline_t_0 = 5, A = 0.007246681, B = -0.1025484, C = 0.4600592, D = -0.8749823;
  t_10_event: at (time >= 10): spline_t_0 = 10, A = -0.0005525213, B = 0.006151822, C = -0.02192367, D = -0.2325611;
  t_20_event: at (time >= 20): spline_t_0 = 20, A = 0.0001498546, B = -0.01042382, C = -0.06464362, D = -0.3891369;
  t_60_event: at (time >= 60): spline_t_0 = 60, A = -0.0001111476, B = 0.007558732, C = -0.179247, D = -10.0623;
  t_80_event: at (time >= 80): spline_t_0 = 80, A = -1.880667e-5, B = 0.0008898764, C = -0.01027486, D = -11.51293;
  t_100_event: at (time >= 100): spline_t_0 = 100, A = 5.045691e-6, B = -0.0002385236, C = 0.002752195, D = -11.51293;
  t_120_event: at (time >= 120): spline_t_0 = 120, A = -1.376098e-6, B = 6.421789e-5, C = -0.0007339187, D = -11.51293;
  t_140_event: at (time >= 140): spline_t_0 = 140, A = 4.586992e-7, B = -1.834797e-5, C = 0.0001834797, D = -11.51293;

  // Unit definitions:
  unit time = 60 second;
  unit nM = 1e-9 mole;
  unit pl = 1e-12 litre;
end
