// SBML level 2 version 4

model Weber_RS10()

  // Compartments:
  compartment cyt = 1 pl;

  // Species:
  species PKD in cyt = 0;  // substance in muM
  species PKDDAGa in cyt = 0; PKDDAGa is "PKD_p:DAG";  // substance in muM
  species PI4K3B in cyt = 0; PI4K3B is "PI4KIII\beta";  // substance in muM
  species PI4K3Ba in cyt = 0; PI4K3Ba is "PI4KIII\beta_p";  // substance in muM
  species CERTERa in cyt = 0; CERTERa is "CERT_{a,ER}";  // substance in muM
  species CERT in cyt = 0; CERT is "CERT_{p,ER}";  // substance in muM
  species CERTTGNa in cyt = 0; CERTTGNa is "CERT_{a,TGN}";  // substance in muM

  // Parameters:
  Ect_Expr_CERT_flag = ;
  Ect_Expr_PI4K3beta_flag = ;
  Ect_Expr_PKD_flag = ;
  PdBu_dose = ;
  PdBu_time = ;
  a11 = 0.1832314;
  a12 = 43.65158;
  a21 = 2.137962;
  a22 = 7.943282e-5;
  a31 = 0.1468926;
  a32 = 0.0001096478;
  a33 = 0.0001348963;
  init_CERT = ;
  init_CERTERa = ;
  init_CERTTGNa = ;
  init_PI4K3B = ;
  init_PI4K3Ba = ;
  init_PKD = ;
  init_PKDDAGa = ;
  kb_NB142_70_dose = ;
  kb_NB142_70_time = ;
  m11 = 1.258925e10;
  m22 = 4168.694;
  m31 = 10000000000;
  m33 = 2.041738e7;
  p11 = 4.446313;
  p12 = 0.007585776;
  p13 = 0.002630268;
  p21 = 3.981072;
  p22 = 13.80384;
  p31 = 1778.279;
  p32 = 10.23293;
  p33 = 15848.93;
  pu2 = 1;
  pu3 = 9.332543e7;
  pu4 = 3.630781e7;
  pu5 = 41.68694;
  pu6 = 125.8925;
  s12 = 151356.1;
  s21 = 3548134;
  s31 = 4897788;
  u2 has flag;
  u3 has flag;
  u4 has flag;
  u5 has muM;
  u6 has muM;

  // Assignment rules:
  u2 := Ect_Expr_PKD_flag*piecewise(0, time < 0, 1);
  u3 := Ect_Expr_PI4K3beta_flag*piecewise(0, time < 0, 1);
  u4 := Ect_Expr_CERT_flag*piecewise(0, time < 0, 1);
  u5 := PdBu_dose*piecewise(0, time - PdBu_time < 0, 1);
  u6 := kb_NB142_70_dose*piecewise(0, time - kb_NB142_70_time < 0, 1);

  // Reactions:
  v1_v_0: PKD => PKDDAGa; cyt*(CERTERa*PI4K3Ba*PKD*p11*p31/((PI4K3Ba + m31)*(m11 + CERTERa*PI4K3Ba*p31/(PI4K3Ba + m31))));  // modifiers: CERTERa, PI4K3Ba
  v2_v_1: PKD => PKDDAGa; cyt*PKD*p12*(pu5*u5 + 1);
  v3_v_2: PKDDAGa => PKD; cyt*PKDDAGa*p13*(pu6*u6 + 1);
  v4_v_3: => PKD; cyt*s12;
  v5_v_4: => PKD; cyt*pu2*u2;
  v6_v_5: PKD => ; cyt*PKD*a11;
  v7_v_6: PKDDAGa => ; cyt*PKDDAGa*a12;
  v8_v_7: PI4K3Ba => PI4K3B; cyt*PI4K3Ba*p21;
  v9_v_8: PI4K3B => PI4K3Ba; cyt*(PI4K3B*PKDDAGa*p22/(PKDDAGa + m22));  // modifiers: PKDDAGa
  v10_v_9: => PI4K3B; cyt*s21;
  v11_v_10: => PI4K3B; cyt*pu3*u3;
  v12_v_11: PI4K3B => ; cyt*PI4K3B*a21;
  v13_v_12: PI4K3Ba => ; cyt*PI4K3Ba*a22;
  v14_v_13: CERTERa => CERTTGNa; cyt*(CERTERa*PI4K3Ba*p31/(PI4K3Ba + m31));  // modifiers: PI4K3Ba
  v15_v_14: CERT => CERTERa; cyt*CERT*p32;
  v16_v_15: CERTTGNa => CERT; cyt*(CERTTGNa*PKDDAGa*p33/(PKDDAGa + m33));  // modifiers: PKDDAGa
  v17_v_16: => CERTERa; cyt*s31;
  v18_v_17: => CERTERa; cyt*pu4*u4;
  v19_v_18: CERTERa => ; cyt*CERTERa*a31;
  v20_v_19: CERT => ; cyt*CERT*a32;
  v21_v_20: CERTTGNa => ; cyt*CERTTGNa*a33;

  // Unit definitions:
  unit time = 3600 second;
  unit pl = 1e-12 litre;
end
